# Link
# [component: outputs D]
T_Sensor := D[:, 0]
V_Sense := D[:, 1]
fit(ζ) := interp(cspline(T_Sensor, V_Sense), T_Sensor, V_Sense, ζ)
slope(ζ) := d/dζ(fit(ζ))
f(x, b) := b[2]*x^2 + b[1]*x + b[0]
F(x, b) := stack(f(x, b), ∇[b](f(x, b))) → [b[2]*x^2 + b[1]*x + b[0]; 1; x; x^2]
guess := [200; -10^-1; -10^-5]
cg := genfit(V_Sense, T_Sensor, guess, f) = [204.379; -0.176993; -8.39316e-6]
der(D, i) :=
    "Numerical Derivative on a fixed interval"
    x ← rows(D) - 1
    (D[x - 2, 1] - 4*D[x - 1, 1] + 3*D[x, 1])/(D[x, 0] - D[x - 2, 0]) if i == x
    (-D[2, 1] + 4*D[1, 1] - 3*D[0, 1])/(D[2, 0] - D[0, 0]) if i == 0
    (D[i + 1, 1] - D[i - 1, 1])/(D[i + 1, 0] - D[i - 1, 0]) otherwise
# backward numerical derivative
# forward numerical derivative
# central numerical derivative
z :=
    for k ∈ 0 .. rows(D) - 1
        n[k] ← der(D, k)
    n
k_b := 1.3806505*10^-23*joule/K
R_1 := 100*kΩ
R_2 := 2*kΩ
q_e := 1.60217653*10^-19*coul
# annotation to a formula above: from The NIST Reference on Constants, Units, and Uncertainty, from CODATA Recommended Values of the Fundamental Constants - 2002, by Peter J. Mohr and Barry N. Taylor, National Institute of Standards and Technology.
# [component: outputs F]
V_OUT(T1) := k_b/q_e*T1*ln(3)*2*R_1/R_2
T_Test := F[:, 0] °C
V_Test := F[:, 1]*V
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# [component: inputs ["R1 = 100kΩ", "R2 = 2 kΩ", "Four Qs, all 2N2222"]]
V_OUT(T1, n) := k_b/q_e*T1*ln(n)*2*R_1/R_2
